// SBML level 2 version 4

model petab()

  // Compartments:
  compartment cytoplasm = 1;

  // Species:
  species R1 in cytoplasm = 1/cytoplasm;
  species R2 in cytoplasm = 1/cytoplasm;
  species R1R2 in cytoplasm = 1/cytoplasm;
  species ERK in cytoplasm = 1/cytoplasm;
  species pERK in cytoplasm = ERK*k5*k_ratio/k5;
  species ligand in cytoplasm = 1/cytoplasm;

  // Parameters:
  k1 = 0.1;
  k2 = 0.325;
  k3 = 0.55;
  k4 = k5*k_ratio;
  k5 = 1;

  // Reactions:
  ligandinducedR1R2formationNISS: R1 + R2 => R1R2; k1*R1*R2*ligand*cytoplasm;  // modifiers: ligand
  R1R2decayNISS: R1R2 => R1 + R2; k2*R1R2*cytoplasm;
  ERKtopERKNISS: ERK => pERK; k3*ERK*R1R2*cytoplasm;  // modifiers: R1R2
  ERKtopERKbasal: ERK => pERK; k4*ERK*cytoplasm;
  pERKtoERK: pERK => ERK; k5*pERK*cytoplasm;
  stimulationNISS: => ligand; 0*cytoplasm;

  // Events:
  at (time >= 0): ligand = 1;

  // Unit definitions:
  unit time = 60 second;
end
